// COMSOL Multiphysics 5.1.0.234 model "convection_diffusion.mph"
// Outline of the model tree

Coordinate systems
  sys1: Boundary "Boundary System 1"

Geometry
  geom1 "Geometry 1" (2D, length unit m)
    sq1: Square | type = solid; size = 1
    fin: Finalize "Form Union"

Physics
  cdeq: ConvectionDiffusionEquation on domains 1
    dependent variable u
    Units.DependentVariableQuantity = dimensionless
    cdeq1: ConvectionDiffusionEquation (default) | f = 0; c = {10, 0, 0, 10}; be = {0, 0}
    zflx1: ZeroFluxBoundary "Zero Flux 1" (default)
    init1: init "Initial Values 1" (default) | u = exp(-Yg^2); uTIME = 0
  dg: DeformedGeometry on domains 1
    fix1: FixedMesh (default)
    disp1: PrescribedMeshDisplacement (default) | useDx = {1, 1}
    free1: FreeDeformation on domains 1
    vel1: PrescribedMeshVelocity on boundaries 3 | vx = {0, -0.05}
    disp2: PrescribedMeshDisplacement on boundaries 1, 4 | useDx = {1, 0}

Mesh
  mesh1 "Mesh 1"
    size: MeshSizeDefault | hauto = 3
    ftri2: FreeTri "Free Triangular 2" on remaining entities

Studies
  std1 "Study 1"
    time: Transient "Time Dependent" | tlist = range(0,1,10)

Solver configurations
  sol1 "Solution 1" (study std1)
    v1: Variables "Dependent Variables 1"
    t1: Time "Time-Dependent Solver 1" | tlist = range(0,1,10)
      dDef: Direct
      fc1: FullyCoupled | linsolver = dDef

Datasets
  dset1: Solution | solution = sol1

Plots
  pg1: PlotGroup2D "2D Plot Group 1" | data = dset1
    surf1: Surface | expr = u